// COMSOL Multiphysics 4.3.2.189 model "active.mph"
// Outline of the model tree

Parameters
  w_tot = 2*6000[nm]
  d_wire = 120[nm]
  d_wire2 = 135[nm]
  d_wire1 = 120[nm]
  n_wire = 15
  dd_wire = (d_wire2-d_wire1)/n_wire
  uneff = 1.05-i*0.015+i*ZnOgain/8
  h_gap = 10[nm]
  h_sub = 250[nm]
  h_sup = 2000[nm]
  h_tot = h_sub+h_sup
  ulambda = 380[nm]
  ufreq = c_const/ulambda
  ulambda1 = 380[nm]
  ufreq1 = c_const/ulambda1
  ufreq2 = c_const/ulambda
  nfr = 50
  dfr = (ufreq2-ufreq1)/nfr
  size_pml = 2400[nm]
  size_pml_top = 250[nm]
  strength_pml = 0.1
  ZnOgain = 0.2
  ompl = 13960.4[THz]
  epsinf = 1.17152
  gammapl = 12.6126e-12[THz]
  oL1 = 8257.18[THz]
  gL1 = 195.614[THz]
  dL1 = 2.23994
  oL2 = 3057.07[THz]
  gL2 = 852.675[THz]
  dL2 = 0.222651

Functions
  an1: Analytic | funcname = eps_Ag; expr = (epsinf-ompl^2/((2*pi*x)^2+i*gammapl*2*pi*x)+dL1*oL1^2/(oL1^2-(2*pi*x)^2+i*2*gL1*2*pi*x)+dL2*oL2^2/(oL2^2-(2*pi*x)^2+i*2*gL2*2*pi*x)); args = x; complex = on
  an2: Analytic | funcname = deps_Ag; expr = d(eps_Ag(x),x); args = x; complex = on

Variables
  var1 "Variables 1a"
    En_ZnO = Int_ZnO(2*emw.Weav)
    En_d = Int_d(2*emw.Weav)
    En_m = Int_m(1/2*epsilon0_const*real(eps_Ag(emw.freq))*emw.normE^2+real(1/4*epsilon0_const*emw.freq*deps_Ag(emw.freq)*emw.normE^2))
    Confinement = En_ZnO/(En_ZnO+En_d+En_m)
    P_z = Int_full(emw.Poavz)
    n_E = (En_ZnO+En_d+En_m)/P_z*2.9979e8
    gamma = -imag(emw.neff)*33.063/n_E*2.9979e8*100*1e4
    Gain_fac = Confinement*n_E/2.3
    alpha = -imag(emw.neff)*33.063

Couplings
  intop1: Integration on domains 15 | opname = Int_ZnO
  intop2: Integration on domains 1, 5, 11 | opname = Int_m
  intop3: Integration on domains 2-4, 6-10, 12-14 | opname = Int_d
  intop4: Integration on domains 1-15 | opname = Int_full

Probes
  var1: GlobalVariable "Global Variable Probe 1" | expr = ZnOgain*7.186
  var2: GlobalVariable "Global Variable Probe 2" | expr = real(emw.neff); descr = real(neff)
  var3: GlobalVariable "Global Variable Probe 3" | expr = -imag(emw.neff); descr = imag(neff)
  var4: GlobalVariable "Global Variable Probe 4" | expr = Confinement; table = default
  var5: GlobalVariable "Global Variable Probe 5" | expr = n_E; descr = Energy index; table = default
  var6: GlobalVariable "Global Variable Probe 6" | expr = alpha; descr = alpha (10^4/cm)
  var7: GlobalVariable "Global Variable Probe 7" | expr = gamma; descr = rate (1/ps)
  var8: GlobalVariable "Global Variable Probe 8" | expr = Gain_fac; descr = Modal gain factor
  var9: GlobalVariable "Global Variable Probe 9" | expr = alpha/Gain_fac; descr = Required bulk gain (10^4/cm)

Coordinate systems
  pml1: PML "Perfectly Matched Layer 1" (disabled) on domains 4, 8, 14
    stretchingType = polynomial
    wavelengthSourceType = fromPhysics
    PMLfactor = 1
    PMLgamma = 1
  pml2: PML "Perfectly Matched Layer 2" (disabled) on domains 1-3, 11-13
    stretchingType = polynomial
    wavelengthSourceType = fromPhysics
    PMLfactor = 0.001
    PMLgamma = 1
  pml3: PML "Perfectly Matched Layer 3" (disabled) on domains 1, 5, 11
    ScalingType = Cartesian
    stretchingType = polynomial
    PMLfactor = 0.01
    PMLgamma = 1
  pml4: PML "Perfectly Matched Layer 4" (disabled) on no domains
    stretchingType = polynomial
    wavelengthSourceType = fromPhysics
    PMLfactor = 0.001
    PMLgamma = 1

Geometry
  geom1 "Geometry 1" (2D, length unit nm)
    r1: Rectangle | pos = {-w_tot/2, 0}; size = {w_tot, h_tot}
    r2: Rectangle | pos = {-w_tot/2, 0}; size = {w_tot, h_sub}
    r3: Rectangle | pos = {-w_tot/2, h_sub}; size = {w_tot, h_gap}
    c1: Circle | pos = {0, h_sub+h_gap+d_wire/2}; r = d_wire/2
    r4: Rectangle | pos = {-w_tot/2, 0}; size = {size_pml, h_tot}
    r5: Rectangle | pos = {w_tot/2-size_pml, 0}; size = {size_pml, h_tot}
    r6: Rectangle | pos = {-w_tot/2, h_tot-size_pml_top}; size = {w_tot, size_pml_top}
    r7: Rectangle (disabled) | pos = {-w_tot/2, 0}; size = {w_tot, size_pml}
    r8: Rectangle | pos = {-100, h_sub}; size = {200, h_gap}
    fin: Finalize "Form Union"

Materials
  mat1 "silver" on domains 1, 5, 11
    def "Basic"
      relpermeability = 1
      electricconductivity = 0
      relpermittivity = epsinf-ompl^2/((2*pi*freq)^2+i*gammapl*2*pi*freq)+dL1*oL1^2/(oL1^2-(2*pi*freq)^2+i*2*gL1*2*pi*freq)+dL2*oL2^2/(oL2^2-(2*pi*freq)^2+i*2*gL2*2*pi*freq)
  mat2 "air" on domains 3, 4, 7, 8, 13, 14
    def "Basic"
      relpermittivity = 1
      relpermeability = 1
      electricconductivity = 0
  mat3 "buffer" on domains 2, 6, 9, 10, 12
    def "Basic"
      relpermittivity = 1.4^2
      relpermeability = 1
      electricconductivity = 0
  mat4 "zno" on domains 15
    def "Basic"
      relpermittivity = 2.3^2+i*ZnOgain
      relpermeability = 1
      electricconductivity = 0
  mat5 "leftPML" (disabled) on domains 3, 4
    def "Basic"
      relpermeability = 1
      electricconductivity = 0
      relpermittivity = 1-i*strength_pml*((x+w_tot/2-size_pml)/size_pml)^2
  mat6 "rigthPML" (disabled) on domains 13, 14
    def "Basic"
      relpermeability = 1
      electricconductivity = 0
      relpermittivity = 1-i*strength_pml*((x-w_tot/2+size_pml)/size_pml)^2

Physics
  emw: ElectromagneticWaves "Electromagnetic Waves, Frequency Domain" on all domains
    dependent variable E = {Ex, Ey, Ez}
    wee1: WaveEquationElectric (default)
    pec1: PerfectElectricConductor (default)
    init1: init "Initial Values 1" (default)
    imp1: Impedance "Impedance Boundary Condition 1" (disabled) on boundaries 1, 2, 7, 9-12, 14, 16, 18, 26-28, 30, 32, 34, 35, 38
      murbnd_mat = userdef
      murbnd = 1
      sigmabnd_mat = userdef
      sigmabnd = 0
    sctr1: Scattering "Scattering Boundary Condition 1" (disabled) on boundaries 1, 2, 7, 9-12, 14, 16, 18, 26-28, 30, 32, 34, 35, 38

Mesh
  mesh1 "Mesh 1"
    size: MeshSizeDefault | hmax = 5; hauto = 1; custom = on
    ftri1: FreeTri "Free Triangular 1" on domains 9
    ftri3: FreeTri "Free Triangular 3" on domains 15
    size1: Size on entire geometry | hauto = 5
    ftri2: FreeTri "Free Triangular 2" on remaining entities

Studies
  std1 "Study 1"
    param: Parametric "Parametric Sweep" (disabled)
      sweeptype = sparse
      pname = d_wire
      plistarr = range(d_wire2,-dd_wire,d_wire1)
      useaccumtable = on
      accumtable = new
    param2: Parametric "Parametric Sweep 2"
      pname = ZnOgain
      plistarr = range(0.16,-0.005,0.13)
      useaccumtable = on
      accumtable = new
      keepsol = last
    mode: ModeAnalysis
      neigs = 1
      shift = uneff
      modeFreq = ufreq
      notsolmethod = sol
      notstudy = std1
      initmethod = init
      initstudy = std1

Datasets
  an1_ds1: Function1D | function = an1; par1 = x; parmin1 = 7.89E14; parmax1 = 7.91E14
  an3_ds1: Function1D "Function 1D 1a" | function = all; par1 = x; parmin1 = 0; parmax1 = 1